AnyShortestPathMuscle RectusFemoris1New =
{
  AnyMuscleModel& MusMdl = .RectusFemoris1.MusMdl;
  AnyRefFrame& Org = .RectusFemoris1.Org;
  AnyRefFrame& Ins = .RectusFemoris1.Ins;
  AnyParamSurf& srf1 =  ..Seg.Thigh.IliacusWrapSurfNew.Surf;
  AnyParamSurf& srf2 = .RectusFemoris1.srf2;

  SPLine =
  {
    StringMesh = ..RectusFemoris1.SPLine.StringMesh;
    InitWrapPosVecArr = ..RectusFemoris1.SPLine.InitWrapPosVecArr;
  };
  AnyDrawMuscle DrwMus = {#include "<PATH_DRAWSETTINGS_AMMR>/MusDrawSettings.any"};
};//RectusFemoris1New

AnyShortestPathMuscle RectusFemoris2New =
{
  AnyMuscleModel& MusMdl = .RectusFemoris2.MusMdl;
  AnyRefFrame& Org = .RectusFemoris2.Org;
  AnyRefFrame& Ins = .RectusFemoris2.Ins;
  AnyParamSurf& srf1 =  ..Seg.Thigh.IliacusWrapSurfNew.Surf;
  AnyParamSurf& srf2 = .RectusFemoris2.srf2;

  SPLine =
  {
    StringMesh = ..RectusFemoris2.SPLine.StringMesh;
    InitWrapPosVecArr = ..RectusFemoris2.SPLine.InitWrapPosVecArr;
  };
  AnyDrawMuscle DrwMus = {#include "<PATH_DRAWSETTINGS_AMMR>/MusDrawSettings.any"};
};//RectusFemoris2New

AnyShortestPathMuscle IliacusMid1New =
{
  AnyMuscleModel& MusMdl = .IliacusMid1.MusMdl;
  AnyRefFrame& Org = .IliacusMid1.Org;
  AnyRefFrame& Via1 = .IliacusMid1.Via1;
  AnyRefFrame& Ins = .IliacusMid1.Ins;
  AnyParamSurf& srf =  ..Seg.Thigh.IliacusWrapSurfNew.Surf;
  SPLine =
  {
    StringMesh = ..IliacusMid1.SPLine.StringMesh;
    InitWrapPosVecArr = ..IliacusMid1.SPLine.InitWrapPosVecArr;
  };
  AnyDrawMuscle DrwMus = {#include "<PATH_DRAWSETTINGS_AMMR>/MusDrawSettings.any"};
};//IliacusMid2New

AnyShortestPathMuscle IliacusMid2New =
{
  AnyMuscleModel& MusMdl = .IliacusMid2.MusMdl;
  AnyRefFrame& Org = .IliacusMid2.Org;
  AnyRefFrame& Via1 = .IliacusMid1.Via1;
  AnyRefFrame& Ins = .IliacusMid2.Ins;
  AnyParamSurf& srf =  ..Seg.Thigh.IliacusWrapSurfNew.Surf;
  SPLine =
  {
    StringMesh = ..IliacusMid2.SPLine.StringMesh;
    InitWrapPosVecArr = ..IliacusMid2.SPLine.InitWrapPosVecArr;
  };
  AnyDrawMuscle DrwMus = {#include "<PATH_DRAWSETTINGS_AMMR>/MusDrawSettings.any"};
};//IliacusMid2New

AnyShortestPathMuscle IliacusMedialis1New =
{
  AnyMuscleModel& MusMdl = .IliacusMedialis1.MusMdl;
  AnyRefFrame& Org = .IliacusMedialis1.Org;
  AnyRefFrame& Via1 = .IliacusMedialis1.Via1;
  AnyRefFrame& Ins = .IliacusMedialis1.Ins;
  AnyParamSurf& srf =  ..Seg.Thigh.IliacusWrapSurfNew.Surf;
  SPLine =
  {
    StringMesh = ..IliacusMedialis1.SPLine.StringMesh;
    InitWrapPosVecArr = ..IliacusMedialis1.SPLine.InitWrapPosVecArr;
  };
  AnyDrawMuscle DrwMus = {#include "<PATH_DRAWSETTINGS_AMMR>/MusDrawSettings.any"};
};//IliacusMedialis1New

AnyShortestPathMuscle IliacusMedialis2New =
{
  AnyMuscleModel& MusMdl = .IliacusMedialis2.MusMdl;
  AnyRefFrame& Org = .IliacusMedialis2.Org;
  AnyRefFrame& Via1 = .IliacusMedialis2.Via1;
  AnyRefFrame& Ins = .IliacusMedialis2.Ins;
  AnyParamSurf& srf =  ..Seg.Thigh.IliacusWrapSurfNew.Surf;
  SPLine =
  {
    StringMesh = ..IliacusMedialis2.SPLine.StringMesh;
    InitWrapPosVecArr = ..IliacusMedialis2.SPLine.InitWrapPosVecArr;
  };
  AnyDrawMuscle DrwMus = {#include "<PATH_DRAWSETTINGS_AMMR>/MusDrawSettings.any"};
};//IliacusMedialis2New

AnyShortestPathMuscle Pectineus1New =
{
  AnyMuscleModel& MusMdl = .Pectineus1.MusMdl;
  AnyRefFrame& Org = .Pectineus1.Org;
  AnyRefFrame& Ins = .Pectineus1.Ins;
  AnyParamSurf& srf =  ..Seg.Thigh.IliacusWrapSurfNew.Surf;
  SPLine =
  {
    StringMesh = ..Pectineus1.SPLine.StringMesh;

  };
  AnyDrawMuscle DrwMus = {#include "<PATH_DRAWSETTINGS_AMMR>/MusDrawSettings.any"};
};//Pectineus1New

AnyShortestPathMuscle Pectineus2New =
{
  AnyMuscleModel& MusMdl = .Pectineus2.MusMdl;
  AnyRefFrame& Org = .Pectineus2.Org;
  AnyRefFrame& Ins = .Pectineus2.Ins;
  AnyParamSurf& srf =  ..Seg.Thigh.IliacusWrapSurfNew.Surf;
  SPLine =
  {
    StringMesh = ..Pectineus2.SPLine.StringMesh;

  };
  AnyDrawMuscle DrwMus = {#include "<PATH_DRAWSETTINGS_AMMR>/MusDrawSettings.any"};
};//Pectineus2New

AnyShortestPathMuscle Pectineus3New =
{
  AnyMuscleModel& MusMdl = .Pectineus3.MusMdl;
  AnyRefFrame& Org = .Pectineus3.Org;
  AnyRefFrame& Ins = .Pectineus3.Ins;
  AnyParamSurf& srf =  ..Seg.Thigh.IliacusWrapSurfNew.Surf;
  SPLine =
  {
    StringMesh = ..Pectineus3.SPLine.StringMesh;

  };
  AnyDrawMuscle DrwMus = {#include "<PATH_DRAWSETTINGS_AMMR>/MusDrawSettings.any"};
};//Pectineus3New

AnyShortestPathMuscle Pectineus4New =
{
  AnyMuscleModel& MusMdl = .Pectineus4.MusMdl;
  AnyRefFrame& Org = .Pectineus4.Org;
  AnyRefFrame& Ins = .Pectineus4.Ins;
  AnyParamSurf& srf =  ..Seg.Thigh.IliacusWrapSurfNew.Surf;
  SPLine =
  {
    StringMesh = ..Pectineus4.SPLine.StringMesh;

  };
  AnyDrawMuscle DrwMus = {#include "<PATH_DRAWSETTINGS_AMMR>/MusDrawSettings.any"};
};//Pectineus4New
