PatientNode = {

  JOINT_FITTING_DATA_SHANK FittingData() = {};

  //fit ankle here: todo
  AnySurfEllipsoidFit AnkleJointFit = {
    Spherical = On;
    Points = .FittingData.AnkleJointPoints;//will use morphed femoral head as input
    //AnyDrawRefFrame DrawAnkleJointTibia= {ScaleXYZ={1,1,1}*0.1;RGB={1,1,0};};
  };

  AnyFunTransform3DLin ThighToShankReg = {
    ScaleMat ??= eye(3);
    Offset ??= {0,0,0};
  };
  AnyRefNode KneeJoint = {
    sRel = .ThighToShankReg(...Thigh.PatientNode.KneeJointFit.sRel);
    ARel = RotMat(
      .ThighToShankReg({0.0,0.0,0.0}),
      .ThighToShankReg({1.0,0.0,0.0}),
      .ThighToShankReg({0.0,1.0,0.0})
      )*...Thigh.PatientNode.ARel'*...Thigh.KneeJointNew.ARel; // fitted and aligned axes
  };

  AnyRefNode KneeJointConstructed = {
    sRel = .ThighToShankReg(...Thigh.PatientNode.KneeJointConstructed.sRel);
    ARel = RotMat(
      .ThighToShankReg({0.0,0.0,0.0}),
      .ThighToShankReg({1.0,0.0,0.0}),
      .ThighToShankReg({0.0,1.0,0.0})
      )*...Thigh.PatientNode.KneeJointConstructed.ARel; // fitted and aligned axes
  };

  AnyRefNode AnkleJoint = {}; //placeholder
};// automatically created


AnyRefNode KneeJointNew = {
  #if (RightTibioFemoralJointInterface != __SCALING_INTERFACE_TYPE_CONSISTENT__ & SEG_SIGN == 1) | (LeftTibioFemoralJointInterface != __SCALING_INTERFACE_TYPE_CONSISTENT__ & SEG_SIGN == -1)
    sRel ??= .KneeJointAnatomicalFrame.sRel;
    ARel ??= .KneeJointAnatomicalFrame.ARel;
  #else
   sRel ??= .PatientNode.sRel + .PatientNode.KneeJoint.sRel * .PatientNode.ARel';
   ARel ??= .PatientNode.ARel * .PatientNode.KneeJoint.ARel;
  #endif
};

AnyRefNode AnkleJointNew =
{
  #if (RightTaloCruralJointInterface != __SCALING_INTERFACE_TYPE_CONSISTENT__ & SEG_SIGN == 1) | (LeftTaloCruralJointInterface != __SCALING_INTERFACE_TYPE_CONSISTENT__ & SEG_SIGN == -1)
    sRel ??= .AnkleJointComplexAnatomicalFrame.sRel;
    ARel ??= .AnkleJointComplexAnatomicalFrame.ARel;
  #else
   AnyInt error_ankle_joint_fitting = assert(1, "Ankle joint fitting is not implemented yet.");
   sRel ??= .PatientNode.sRel + .PatientNode.AnkleJoint.sRel * .PatientNode.ARel';
   ARel ??= .PatientNode.ARel * .PatientNode.AnkleJoint.ARel;
  #endif

//  sRel = .PatientRefNode.sRel +
//  (.PatientRefNode.Talus_Trochlea_Fitting_Surf_Node.sRel +
//   .PatientRefNode.Talus_Trochlea_Fitting_Surf_Node.OffsetNode.sRel
//  *.PatientRefNode.Talus_Trochlea_Fitting_Surf_Node.ARel')
//  *.PatientRefNode.ARel';
//  ARel = .PatientRefNode.ARel * .PatientRefNode.Talus_Trochlea_Fitting_Surf_Node.ARel*.PatientRefNode.Talus_Trochlea_Fitting_Surf_Node.OffsetNode.ARel;
};


#if (BM_JOINT_TYPE_KNEE_RIGHT == _JOINT_TYPE_USERDEFINED_ & SEG_SIGN == 1) | (BM_JOINT_TYPE_KNEE_LEFT == _JOINT_TYPE_USERDEFINED_ & SEG_SIGN == -1)
AnyRefNode& KneeJoint = KneeJointNew;
#endif

#if (BM_JOINT_TYPE_ANKLE_RIGHT == _JOINT_TYPE_USERDEFINED_ & SEG_SIGN == 1) | (BM_JOINT_TYPE_ANKLE_LEFT == _JOINT_TYPE_USERDEFINED_ & SEG_SIGN == -1)
AnyRefNode& AnkleJoint = AnkleJointNew;
#endif
//
//#if (BM_JOINT_TYPE_PATELLATENDON_RIGHT == _JOINT_TYPE_USERDEFINED_ & SEG_SIGN == 1) | (BM_JOINT_TYPE_PATELLATENDON_LEFT == _JOINT_TYPE_USERDEFINED_ & SEG_SIGN == -1)
//AnyRefNode Insertion_patella_tendon =
//{
//  //sRel = .Scale( .StdPar.Insertion_patella_tendon );
//  #if KNEE_MODEL_VERSION == "GCK4"
//	sRel = .Mapping_Transform({-0.0343431, -0.0346712, -0.0110248}); // GCK4
//  #endif
//  #if KNEE_MODEL_VERSION == "GCK6"
//	sRel = .Mapping_Transform({-0.0203,-0.0707,-0.0096});	//GCK6
//  #endif
//};
//#endif
