Main =
{
  DrawSettings.Colors =
  {
    AnyVec3 Ligaments = {0, 1, 1};
    AnyVec3 Tendons = {1, 0, 1};
  };
};

//#path USER_PATH_INPUTDATA "../[Input]/"+KNEE_MODEL_VERSION

#path PATH_DRAWSETTINGS_AMMR "<ANYBODY_PATH_BODY>\DrawSettings\"

// AnyBody generic boney landmarks and surfaces - currently specific to a generation (might have used different procotocol).
// TODO: check if can be unified?

//#path PATH_SOURCE_FEMUR_LANDMARKS   "<USER_PATH_COMMONS>\Morphing\TLEM2_Femur_picked_points.pp"
#path PATH_SOURCE_FEMUR_STL         "<USER_PATH_COMMONS>\Morphing\femur.stl"
//#path PATH_SOURCE_TIBIA_LANDMARKS   "<USER_PATH_COMMONS>\Morphing\TLEM2_Tibia_picked_points.pp"
#path PATH_SOURCE_TIBIA_STL         "<USER_PATH_COMMONS>\Morphing\tibia.stl"
#path PATH_SOURCE_FIBULA_STL        "<USER_PATH_COMMONS>\Morphing\fibula.stl"
#path PATH_SOURCE_TIBIAFIBULA_STL   "<USER_PATH_COMMONS>\Morphing\tibiafibula.stl"
#path PATH_SOURCE_PATELLA_LANDMARKS "<USER_PATH_COMMONS>\Morphing\TLEM2_Patella_picked_points.pp"
#path PATH_SOURCE_PATELLA_STL       "<USER_PATH_COMMONS>\Morphing\patella.stl"

//// GCK generation specific file configuration
//#if KNEE_MODEL_VERSION == "GCK4"
//  #include "Settings_Default.GCK4.any"
//#endif
//
//#if KNEE_MODEL_VERSION == "GCK6"
//  #include "Settings_Default.GCK6.any"
//#endif


// This section is LabSpecific/SubjectSpecific. Moved to Lab/Morphing/DataConfig.any


//--> #define statements for custom scaling of AMMR lower body segments
//#ifndef _override_scaling_for_Pelvis
//  #define _override_scaling_for_Pelvis
//#endif
//
//
//#ifndef _override_scaling_for_Right_Thigh
//  #define _override_scaling_for_Right_Thigh
//#endif
//
//#ifndef _override_scaling_for_Left_Thigh
//  #define _override_scaling_for_Left_Thigh
//#endif
//
//#ifndef _override_scaling_for_Right_Shank
//  #define _override_scaling_for_Right_Shank
//#endif
//
//#ifndef _override_scaling_for_Left_Shank
//  #define _override_scaling_for_Left_Shank
//#endif
//
//#ifndef _override_scaling_for_Right_Patella
//  #define _override_scaling_for_Right_Patella
//#endif
//
//#ifndef _override_scaling_for_Left_Patella
//  #define _override_scaling_for_Left_Patella
//#endif
//<--

//--> #define statments of the custom scaling levels for AMMR lower body segments
#ifndef DEF_CUSTOM_SCALING_LEVEL_RIGHT_THIGH
  #define DEF_CUSTOM_SCALING_LEVEL_RIGHT_THIGH "RBF"
#endif
#ifndef DEF_CUSTOM_SCALING_LEVEL_LEFT_THIGH
  #define DEF_CUSTOM_SCALING_LEVEL_LEFT_THIGH "RBF"
#endif
#ifndef DEF_CUSTOM_SCALING_LEVEL_RIGHT_SHANK
  #define DEF_CUSTOM_SCALING_LEVEL_RIGHT_SHANK "RBF"
#endif
#ifndef DEF_CUSTOM_SCALING_LEVEL_LEFT_SHANK
  #define DEF_CUSTOM_SCALING_LEVEL_LEFT_SHANK "RBF"
#endif
#ifndef DEF_CUSTOM_SCALING_LEVEL_RIGHT_PATELLA
  #define DEF_CUSTOM_SCALING_LEVEL_RIGHT_PATELLA "RBF"
#endif
#ifndef DEF_CUSTOM_SCALING_LEVEL_LEFT_PATELLA
  #define DEF_CUSTOM_SCALING_LEVEL_LEFT_PATELLA "RBF"
#endif
//<--

// custom patella tendon length
#ifndef DEF_CUSTOM_SCALING_PATELLA_TENDON_LENGTH
  //#define DEF_CUSTOM_SCALING_PATELLA_TENDON_LENGTH 0.05569755
  //#define DEF_CUSTOM_SCALING_PATELLA_TENDON_LENGTH 0.05930586
  #define DEF_CUSTOM_SCALING_PATELLA_TENDON_LENGTH 0.069
#endif


//
////--> #define statements of the custom joint types for AMMR lower body joints
//#ifndef BM_JOINT_TYPE_HIP_RIGHT
//  #define BM_JOINT_TYPE_HIP_RIGHT _JOINT_TYPE_USERDEFINED_
//#endif
//#ifndef BM_JOINT_TYPE_HIP_LEFT
//  #define BM_JOINT_TYPE_HIP_LEFT _JOINT_TYPE_USERDEFINED_
//#endif
//#ifndef BM_JOINT_TYPE_KNEE_RIGHT
//  #define BM_JOINT_TYPE_KNEE_RIGHT _JOINT_TYPE_USERDEFINED_
//#endif
//#ifndef BM_JOINT_TYPE_KNEE_LEFT
//  #define BM_JOINT_TYPE_KNEE_LEFT _JOINT_TYPE_USERDEFINED_
//#endif


//#ifndef BM_JOINT_TYPE_PATELLOFEMORAL_RIGHT
//  #define BM_JOINT_TYPE_PATELLOFEMORAL_RIGHT _JOINT_TYPE_USERDEFINED_
//#endif
//#ifndef BM_JOINT_TYPE_PATELLOFEMORAL_LEFT
//  #define BM_JOINT_TYPE_PATELLOFEMORAL_LEFT _JOINT_TYPE_USERDEFINED_
//#endif
//#ifndef BM_JOINT_TYPE_ANKLE_RIGHT
//  #define BM_JOINT_TYPE_ANKLE_RIGHT _JOINT_TYPE_USERDEFINED_
//#endif
//#ifndef BM_JOINT_TYPE_ANKLE_LEFT
//  #define BM_JOINT_TYPE_ANKLE_LEFT _JOINT_TYPE_USERDEFINED_
//#endif
//#ifndef BM_JOINT_TYPE_PATELLATENDON_RIGHT
//  #define BM_JOINT_TYPE_PATELLATENDON_RIGHT _JOINT_TYPE_USERDEFINED_
//#endif
//#ifndef BM_JOINT_TYPE_PATELLATENDON_LEFT
//  #define BM_JOINT_TYPE_PATELLATENDON_LEFT _JOINT_TYPE_USERDEFINED_
//#endif
//<--


#ifndef DEF_MUSCLE_RECRUITMENT_CRITERION_POWER
  #define DEF_MUSCLE_RECRUITMENT_CRITERION_POWER 3
#endif

#ifndef USE_FDK
  #define USE_FDK 0
#endif
#ifndef USE_FDK_SOFT_DRIVERS
  #define USE_FDK_SOFT_DRIVERS 0
#endif
#ifndef FDK_SolverType
  #define FDK_SolverType FDK_Solver_Newton
#endif
#ifndef FDK_UseAdaptiveForceTolOnOff
  #define FDK_UseAdaptiveForceTolOnOff Off
#endif
#ifndef FDK_ForceTol
  #define FDK_ForceTol 1e-0
#endif
#ifndef FDK_Perturbation
  #define FDK_Perturbation 1e-5
#endif
#ifndef FDK_MaxIteration
  #define FDK_MaxIteration 100
#endif
#ifndef FDK_MaxNewtonStep
  #define FDK_MaxNewtonStep 1e-3*10
#endif
#ifndef FDK_LocalSearchOnOff
  #define FDK_LocalSearchOnOff On
#endif

#ifndef DEF_CUSTOM_JOINT_INIT_OFFSET_TIBIOFEMORAL_LIN
  //#define DEF_CUSTOM_JOINT_INIT_OFFSET_TIBIOFEMORAL_LIN {0.0, -0.042, 0.0}
  #define DEF_CUSTOM_JOINT_INIT_OFFSET_TIBIOFEMORAL_LIN {0.0, -0.0425, 0.0}
#endif

#ifndef DEF_CUSTOM_JOINT_INIT_OFFSET_TIBIOFEMORAL_ROT
  #define DEF_CUSTOM_JOINT_INIT_OFFSET_TIBIOFEMORAL_ROT {0, 0, 0}
#endif

#ifndef DEF_CUSTOM_JOINT_INIT_OFFSET_PATELLOFEMORAL_LIN
  //#define DEF_CUSTOM_JOINT_INIT_OFFSET_PATELLOFEMORAL_LIN {-0.0425, 0.0, -0.0065}
  //#define DEF_CUSTOM_JOINT_INIT_OFFSET_PATELLOFEMORAL_LIN {-0.0425, 0.003807204, -0.007}
  #define DEF_CUSTOM_JOINT_INIT_OFFSET_PATELLOFEMORAL_LIN {-0.04285, 0.003807204, -0.007}
#endif

#ifndef DEF_CUSTOM_JOINT_INIT_OFFSET_PATELLOFEMORAL_ROT
  #define DEF_CUSTOM_JOINT_INIT_OFFSET_PATELLOFEMORAL_ROT {0, 0, 0}
#endif

#ifndef DEF_CONTACT_PRESSURE_TIBIOFEMORAL
  //#define DEF_CONTACT_PRESSURE_TIBIOFEMORAL 4.68e9
  #define DEF_CONTACT_PRESSURE_TIBIOFEMORAL 9.3e9
#endif
#ifndef DEF_CONTACT_PRESSURE_PATELLOFEMORAL
  //#define DEF_CONTACT_PRESSURE_PATELLOFEMORAL 4.68e9
  #define DEF_CONTACT_PRESSURE_PATELLOFEMORAL 9.3e9
#endif
//#ifndef DEF_CONTACT_PRESSURE_MENISCUS
//  #define DEF_CONTACT_PRESSURE_MENISCUS 1e8
//#endif
#ifndef DEF_CONTACT_MESH_REFINEMENT_TIBIOFEMORAL_FEMUR
  #define DEF_CONTACT_MESH_REFINEMENT_TIBIOFEMORAL_FEMUR 0
#endif
#ifndef DEF_CONTACT_MESH_REFINEMENT_TIBIOFEMORAL_TIBIA
  #define DEF_CONTACT_MESH_REFINEMENT_TIBIOFEMORAL_TIBIA 0
#endif
#ifndef DEF_CONTACT_MESH_REFINEMENT_PATELLOFEMORAL_FEMUR
  #define DEF_CONTACT_MESH_REFINEMENT_PATELLOFEMORAL_FEMUR 0
#endif
#ifndef DEF_CONTACT_MESH_REFINEMENT_PATELLOFEMORAL_PATELLA
  #define DEF_CONTACT_MESH_REFINEMENT_PATELLOFEMORAL_PATELLA 0
#endif
#ifndef DEF_CONTACT_DRAW_FORCE_VECTOR
  #define DEF_CONTACT_DRAW_FORCE_VECTOR 1
#endif
#ifndef DEF_CONTACT_DRAW_PRESSURE_MAP
  #define DEF_CONTACT_DRAW_PRESSURE_MAP 1
#endif

#ifndef DEF_C3D_FILTER_CUT_OFF_FREQ_MARKERS
  #define DEF_C3D_FILTER_CUT_OFF_FREQ_MARKERS 5
#endif
#ifndef DEF_C3D_FILTER_CUT_OFF_FREQ_FORCES
  #define DEF_C3D_FILTER_CUT_OFF_FREQ_FORCES 12
#endif

#ifndef AutoSaveOption
  #define AutoSaveOption 0
#endif

//-->Extra
#ifdef BM_LEG_RIGHT
  #if BM_LEG_RIGHT == OFF
    #ifdef _override_scaling_for_Right_Thigh
      #undef _override_scaling_for_Right_Thigh
    #endif
    #ifdef _override_scaling_for_Right_Shank
      #undef _override_scaling_for_Right_Shank
    #endif
    #ifdef _override_scaling_for_Right_Patella
      #undef _override_scaling_for_Right_Patella
    #endif
  #endif
#endif

#ifdef BM_LEG_LEFT
  #if BM_LEG_LEFT == OFF
    #ifdef _override_scaling_for_Left_Thigh
      #undef _override_scaling_for_Left_Thigh
    #endif
    #ifdef _override_scaling_for_Left_Shank
      #undef _override_scaling_for_Left_Shank
    #endif
    #ifdef _override_scaling_for_Left_Patella
      #undef _override_scaling_for_Left_Patella
    #endif
  #endif
#endif
//<--
